// COMSOL Multiphysics 6.3.0.290 model "4_roll_mill.mph"
// Outline of the model tree

Parameters
  L = 5[cm]
  r = 5[mm]
  H = 1[cm]
  rho = 1000[kg/m^3]
  eta_s = 0.1[Pa*s]
  eta_p = 0.9[Pa*s]
  lambda = 0.5[s]
  omega = 100[rpm]
  gammadot = omega*r/(2*H-2*r)
  Rey = rho*omega*r^2/(eta_s+eta_p)
  De = gammadot*lambda

Selections
  sel1: Explicit "Walls" on boundaries 1-4
  sel3: Explicit "Roll1" on boundaries 15, 16, 19, 20
  sel2: Explicit "Roll2" on boundaries 7, 8, 11, 12
  sel4: Explicit "Roll3" on boundaries 5, 6, 9, 10
  sel5: Explicit "Roll4" on boundaries 13, 14, 17, 18

Geometry
  geom1 "Geometry 1" (2D, length unit m)
    r1: Rectangle | size = {L, L}; base = center
    c1: Circle | r = r; pos = {H, H}
    c2: Circle | r = r; pos = {-H, H}
    c3: Circle | r = r; pos = {-H, -H}
    c4: Circle | r = r; pos = {H, -H}
    dif1: Difference | input = r1; input2 = c1, c2, c3, c4
    fin: Finalize "Form Union"

Physics
  vef: ViscoelasticFlow on all domains
    dependent variable u = {u, v, w}
    fp1: FluidProperties (default)
      rho_mat = userdef
      rho = rho
      mue = eta_p
      lambdae = lambda
      mu_s_mat = userdef
      mu_s = eta_s
    init1: init "Initial Values 1" (default)
    wallbc1: WallBC "Wall 1" (default)
    wallbc2: WallBC "Wall 2" on boundaries 15, 16, 19, 20
      uvw = -omega*r
      SlidingWall = 1
      TranslationalVelocityOption = Manual
    wallbc3: WallBC "Wall 3" on boundaries 7, 8, 11, 12
      uvw = omega*r
      SlidingWall = 1
      TranslationalVelocityOption = Manual
    wallbc4: WallBC "Wall 4" on boundaries 5, 6, 9, 10 | uvw = -omega*r; SlidingWall = 1
    wallbc5: WallBC "Wall 5" on boundaries 13, 14, 17, 18 | uvw = omega*r; SlidingWall = 1
    prpc1: PressurePointConstraint on points 2

Mesh
  mesh1 "Mesh 1"
    size: MeshSizeDefault | table = cfd; hmax = 6.5E-4; hmin = 7.5E-6; hcurve = 0.25; hgrad = 1.08; hauto = 2
    size1: Size on boundaries 5-20 | hmax = 1.57E-4; hmin = 1.57E-4; hauto = 1; custom = on
    ftri1: FreeTri "Free Triangular 1" on remaining entities | smoothmaxiter = 4; smoothmaxdepth = 4

Studies
  std1 "Study 1"
    stat: Stationary | useparam = on; pname = lambda; plistarr = 0.05, 0.5, 1; punit = s

Solver configurations
  sol1 "Solution 1" (study std1)
    v1: Variables "Dependent Variables 1"
    s1: Stationary "Stationary Solver 1"
      p1: Parametric
      fc1: FullyCoupled
      d1: Direct "Direct, fluid flow variables (vef)"

Datasets
  dset1: Solution | solution = sol1
  cln1: CutLine2D | data = dset1; genpoints = {{-L/2, 0}, {L/2, 0}}
  cln2: CutLine2D | data = dset1; genpoints = {{0, -L/2}, {0, L/2}}
  cpt1: CutPoint2D | data = dset1; pointx = -L/2; pointy = L/2

Evaluation groups
  eg1: EvaluationGroup | data = dset1
    pev1: EvalPoint "Point Evaluation 1" | data = cpt1; expr = p

Plots
  pg1: PlotGroup2D "Velocity (vef)" | data = dset1
    surf1: Surface | data = dset1; expr = u
  pg2: PlotGroup2D "Pressure (vef)" | data = dset1
    con1: Contour | expr = p; levelrounding = off
  pg3: PlotGroup1D "1D Plot Group 3" | data = dset1
    lngr1: LineGraph (disabled) | data = cln1; expr = u
    lngr2: LineGraph | data = cln2; expr = v

Exports
  data1: Data
    data = dset1
    expr = {u, v, p, vef.Te_1xx, vef.Te_1xy, vef.Te_1yy}
    descr = {"Velocity field, x-component", "Velocity field, y-component", Pressure, "Viscoelastic extra stress tensor, branch 1, xx-component", "Viscoelastic extra stress tensor, branch 1, xy-component", "Viscoelastic extra stress tensor, branch 1, yy-component"}
    filename = C:\Users\eaglw\Documents\PINN tesi\COMSOL\4_roll_mill_lambda1.csv