// COMSOL Multiphysics 6.3.0.290 model "Oldroyd_mau_res.mph"
// Outline of the model tree

Parameters
  rho = 1000[kg/m^3]
  eta_s = 0.1[Pa*s]
  eta_p = 0.9[Pa*s]
  lambda = 1[s]
  u_avg = 1[mm/s]
  L = 10[cm]
  H = 1[cm]
  Rey = rho*u_avg*H/(eta_s+eta_p)
  De = lambda*u_avg/H
  Rc = H/4

Selections
  sel1: Explicit "Inlet" on boundaries 1
  sel2: Explicit "Outlet" on boundaries 6
  sel3: Explicit "Walls" on boundaries 2-5, 7-10

Geometry
  geom1 "Geometry 1" (2D, length unit m)
    r1: Rectangle | size = {L, H}
    c1: Circle | r = Rc; angle = 180; pos = {L/2, 0}; iscircularsectorold = on
    c2: Circle | r = Rc; angle = 180; pos = {L/2, H}; rot = 180; iscircularsectorold = on
    dif1: Difference | input = r1; input2 = c1, c2
    fin: Finalize "Form Union"

Physics
  vef: ViscoelasticFlow on all domains
    dependent variable u = {u, v, w}
    fp1: FluidProperties (default)
      rho_mat = userdef
      rho = rho
      mue = eta_p
      lambdae = lambda
      mu_s_mat = userdef
      mu_s = eta_s
    init1: init "Initial Values 1" (default)
    wallbc1: WallBC "Wall 1" (default)
    inl1: InletBoundary "Inlet 1" on boundaries 1 | ComponentWise = NormalInflowVelocity; U0in = u_avg
    out1: OutletBoundary "Outlet 1" on boundaries 6 | BoundaryCondition = FullyDevelopedFlow; NormalFlow = 1

Mesh
  mesh1 "Mesh 1"
    ftri1: FreeTri "Free Triangular 1" on entire geometry

Studies
  std1 "Study 1"
    stat: Stationary

Solver configurations
  sol1 "Solution 1" (study std1)
    v1: Variables "Dependent Variables 1"
    s1: Stationary "Stationary Solver 1"
      fc1: FullyCoupled
      d1: Direct "Direct, fluid flow variables (vef)"

Datasets
  dset1: Solution | solution = sol1
  cln1: CutLine2D | data = dset1; genpoints = {{0, H}, {0, 0}}

Plots
  pg1: PlotGroup2D "Velocity (vef)" | data = dset1
    surf1: Surface | expr = u; bandcount = 12
  pg2: PlotGroup2D "Pressure (vef)" | data = dset1
    con1: Contour | expr = p; levelrounding = off
  pg3: PlotGroup1D "1D Plot Group 3" | data = cln1
    lngr1: LineGraph | expr = u; descr = Velocity field, x-component

Exports
  data1: Data
    data = dset1
    expr = {u, v, p, vef.Te_1xx, vef.Te_1xy, vef.Te_1yy}
    descr = {"Velocity field, x-component", "Velocity field, y-component", Pressure, "Viscoelastic extra stress tensor, branch 1, xx-component", "Viscoelastic extra stress tensor, branch 1, xy-component", "Viscoelastic extra stress tensor, branch 1, yy-component"}
    filename = C:\Users\eaglw\Documents\PINN tesi\COMSOL\Oldroyd_mau_res.csv