// COMSOL Multiphysics 6.3.0.335 model "caso_2.mph"
// Outline of the model tree

Parameters
  rho = 1000[kg/m^3]
  eta_s = 0.1[Pa*s]
  eta_p = 0.9[Pa*s]
  lambda = 1[s]
  u_avg = 1[mm/s]
  L = 10[cm]
  H = 1[cm]
  Rey = rho*u_avg*H/(eta_s+eta_p)
  De = lambda*u_avg/H

Geometry
  geom1 "Geometry 1" (2D, length unit m)
    r1: Rectangle | size = {L, H}
    fin: Finalize "Form Union"

Physics
  vef: ViscoelasticFlow on all domains
    dependent variable u = {u, v, w}
    fp1: FluidProperties (default)
      rho_mat = userdef
      rho = rho
      mue = eta_p
      lambdae = lambda
      mu_s_mat = userdef
      mu_s = eta_s
    init1: init "Initial Values 1" (default)
    wallbc1: WallBC "Wall 1" (default)
    inl1: InletBoundary "Inlet 1" on boundaries 1 | ComponentWise = NormalInflowVelocity; U0in = u_avg
    out1: OutletBoundary "Outlet 1" on boundaries 4 | BoundaryCondition = FullyDevelopedFlow; NormalFlow = 1

Mesh
  mesh1 "Mesh 1"
    size: MeshSizeDefault | table = cfd; hmax = 6.7E-4; hmin = 3.0E-5; hcurve = 0.4; hgrad = 1.2; hauto = 6
    size1: Size on boundaries 1-4 | hauto = 4
    ftri1: FreeTri "Free Triangular 1" on remaining entities | smoothmaxiter = 4; smoothmaxdepth = 4

Studies
  std1 "Study 1"
    stat: Stationary

Solver configurations
  sol1 "Solution 1" (study std1)
    v1: Variables "Dependent Variables 1"
    s1: Stationary "Stationary Solver 1"
      fc1: FullyCoupled
      d1: Direct "Direct, fluid flow variables (vef)"

Datasets
  dset1: Solution | solution = sol1

Plots
  pg1: PlotGroup2D "Velocity (vef)" | data = dset1
    surf1: Surface | expr = u; bandcount = 12
  pg2: PlotGroup2D "Pressure (vef)" | data = dset1
    con1: Contour | expr = p; levelrounding = off

Exports
  data1: Data
    data = dset1
    expr = {u, v, p, vef.Te_1xx, vef.Te_1xy, vef.Te_1yy}
    descr = {"Velocity field, x-component", "Velocity field, y-component", Pressure, "Viscoelastic extra stress tensor, branch 1, xx-component", "Viscoelastic extra stress tensor, branch 1, xy-component", "Viscoelastic extra stress tensor, branch 1, yy-component"}