// COMSOL Multiphysics 6.3.0.290 model "Oldyoid_project.mph"
// Outline of the model tree

Parameters
  L = 1[mm]
  H = 0.2[mm]
  eta_s = 0.005 [Pa*s]
  eta_p = 0.005 [Pa*s]
  lambda = 0.1 [s]
  rho = 1000 [kg/m^3]
  deltaP = 1 [atm]
  u_avg = 1 [mm/s]
  Re = u_avg*rho*H/eta_s
  Wi = lambda*u_avg/H

Selections
  sel1: Explicit "Inlet" on boundaries 1
  sel2: Explicit "Outlet" on boundaries 4
  sel3: Explicit "Walls-dritte" on boundaries 2, 3

Geometry
  geom1 "Geometry 1" (2D, length unit m)
    r1: Rectangle | size = {L, H}
    fin: Finalize "Form Union"

Physics
  vef: ViscoelasticFlow on all domains
    dependent variable u = {u, v, w}
    fp1: FluidProperties (default)
      rho_mat = userdef
      rho = rho
      mue = eta_p
      lambdae = lambda
      mu_s_mat = userdef
      mu_s = eta_s
    init1: init "Initial Values 1" (default)
    wallbc1: WallBC "Wall 1" (default)
    inl1: InletBoundary "Inlet 1" on boundaries 1 | BoundaryCondition = FullyDevelopedFlow; Uavfdf = u_avg
    out1: OutletBoundary "Outlet 1" on boundaries 4 | BoundaryCondition = FullyDevelopedFlow

Mesh
  mesh1 "Mesh 1"
    size: MeshSizeDefault | hauto = 2
    edg1: Edge "Walls-dritti" on boundaries 2, 3
    edg2: Edge "Inlet" on boundaries 1
    edg3: Edge "Outlet" on boundaries 4
    ftri1: FreeTri "Free Triangular 1" on domains 1

Studies
  std1 "Study 1"
    stat: Stationary

Solver configurations
  sol1 "Solution 1" (study std1)
    v1: Variables "Dependent Variables 1"
    s1: Stationary "Stationary Solver 1"
      fc1: FullyCoupled
      d1: Direct "Direct, fluid flow variables (vef)"

Datasets
  dset1: Solution | solution = sol1

Plots
  pg1: PlotGroup2D "Velocity (vef)" | data = dset1
    surf1: Surface | expr = vef.U
  pg2: PlotGroup2D "Pressure (vef)" | data = dset1
    con1: Contour | expr = p; levelrounding = off

Exports
  data1: Data
    data = dset1
    expr = {u, v, p, vef.Te_tot_stress_tensorxx, vef.Te_tot_stress_tensorxy, vef.Te_tot_stress_tensoryy}
    unit = {m/s, m/s, Pa, N/m^2, N/m^2, N/m^2}
    descr = {"Velocity field, x-component", "Velocity field, y-component", Pressure, "Total elastic stress tensor, xx-component", "Total elastic stress tensor, xy-component", "Total elastic stress tensor, yy-component"}
    filename = C:\Users\eaglw\Documents\PINN tesi\COMSOL\Oldroyd.csv